// COMSOL Multiphysics 5.3.0.223 model "oneband.mph"
// 未命名
// Outline of the model tree

Parameters
  sig = 1
  k = 4
  B0 = 1.5
  t_h = 0.04
  L = 4
  Bc = 0
  w = 0.1
  a = 0.5

Selections
  g_dst_pc1: Explicit "‘周期性条件 1’的目标选择" on no boundaries

Geometry
  geom1 "几何 1" (2D, length unit m)
    sq1: Square "正方形 1" | pos = {-L/2, -L/2}; size = L
    fin: Finalize "形成联合体"

Physics
  g: GeneralFormPDE "广义型偏微分方程" on all domains
    dependent variable u = {u1, u2, u3, u4, u5}
    gfeq1: GeneralFormPDE "广义型偏微分方程 1" (default)
      f = {+(d(u3,x)*a+d(u4,y))*u2/k+2*(d(u2,x)*u3*a+d(u2,y)*u4)/k-(u3^2*a+u4^2)*u1+u1-(u1^2+u2^2)*u1, -(d(u3,x)*a+d(u4,y))*u1/k-2*(d(u1,x)*u3*a+d(u1,y)*u4)/k-(u3^2*a+u4^2)*u2+u2-(u1^2+u2^2)*u2, (u1*d(u2,x)-u2*d(u1,x))/k*a-(u1^2+u2^2)*u3, (u1*d(u2,y)-u2*d(u1,y))/k-(u1^2+u2^2)*u4, d(u3,x)+d(u4,y)+u5}
      Ga = 
        {-d(u1,x)/k/k*a, -d(u1,y)/k/k}
        {-d(u2,x)/k/k*a, -d(u2,y)/k/k}
        {0, d(u4,x)-d(u3,y)-(B0+Bc*sin(w*t))}
        {-d(u4,x)+d(u3,y)+(B0+Bc*sin(w*t)), 0}
        {u3, u4}
      da = {1, 0, 0, 0, 0, 0, 1, 0, 0, 0, 0, 0, sig, 0, 0, 0, 0, 0, sig, 0, 0, 0, 0, 0, 0}
    zflx1: ZeroFluxBoundary "零通量 1" (default)
    init1: init "初始值 1" (default) | u1 = 0.707; u2 = 0.707
    flux1: FluxBoundary "通量/源 1" on boundaries 2, 3
    pc1: PeriodicCondition "周期性条件 1" on no boundaries | usePeriodicCondition = {1, 1, 1, 1, 1}

Mesh
  mesh1 "网格 1" (physics-controlled)
    size: MeshSizeDefault "尺寸" | hauto = 3

Studies
  std1 "研究 1"
    time: Transient "瞬态" | tlist = range(0,1,300)
  std2 "研究 2"
    stat: Stationary "稳态"

Solver configurations
  sol1 "解 1" (study std1)
    v1: Variables "Dependent Variables 1"
    t1: Time "Time-Dependent Solver 1" | tlist = range(0,1,300)
      dDef: Direct
      fc1: FullyCoupled | linsolver = dDef
  sol2 "解 2" (study std2)
    v1: Variables "因变量 1"
    s1: Stationary "稳态求解器 1"
      dDef: Direct "直接"
      fc1: FullyCoupled "全耦合 1" | linsolver = dDef

Datasets
  dset1: Solution | solution = sol1

Tables
  tbl2: Table "表格 2"
    // 面积分 2 ((B0+d(u3,y)-d(u4,x))^2)
    时间 (s) | (B0+d(u3,y)-d(u4,x))^2 (1) | (B0+d(u3,y)-d(u4,x))^2 (1)
    0 | 26.4413 | 26.4413
    1 | 3.21633 | 3.21633
    2 | 1.50757 | 1.50757
    3 | 0.878968 | 0.878968
    4 | 0.5837 | 0.5837
    5 | 0.426753 | 0.426753
    6 | 0.337501 | 0.337501
    7 | 0.28124 | 0.28124
    8 | 0.243304 | 0.243304
    9 | 0.215434 | 0.215434
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  tbl3: Table "表格 3"
    // 面积分 3 (-1/k*(-2*u4*u2*d(u1,y)+2*u4*u1*d(u2,y)-2*u3*u2*d(u1,x)+2*u3*u1*d(u2,x))+(u3^2+u4^2)*(u1^2+u2^2))
    时间 (s) | -1/k*(-2*u4*u2*d(u1,y)+2*u4*u1*d(u2,y)-2*u3*u2*d(u1,x)+2*u3*u1*d(u2,x))+(u3^2+u4^2)*(u1^2+u2^2) | -1/k*(-2*u4*u2*d(u1,y)+2*u4*u1*d(u2,y)-2*u3*u2*d(u1,x)+2*u3*u1*d(u2,x))+(u3^2+u4^2)*(u1^2+u2^2)
    0 | 0.000766313 | 0.000766313
    1 | 3.28321 | 3.28321
    2 | 2.99559 | 2.99559
    3 | 2.35434 | 2.35434
    4 | 1.74207 | 1.74207
    5 | 1.22563 | 1.22563
    6 | 0.806295 | 0.806295
    7 | 0.476439 | 0.476439
    8 | 0.197118 | 0.197118
    9 | -0.0968677 | -0.0968677
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  tbl4: Table "表格 4"
    // 面积分 1 (1/k/k*(d(u1,x)^2+d(u1,y)^2+d(u2,x)^2+d(u2,y)^2)-u1^2-u2^2+1/2*(u1^2+u2^2)^2)
    时间 (s) | 1/k/k*(d(u1,x)^2+d(u1,y)^2+d(u2,x)^2+d(u2,y)^2)-u1^2-u2^2+1/2*(u1^2+u2^2)^2
    0 | -6.20271
    1 | -5.72578
    2 | -4.7246
    3 | -3.88811
    4 | -3.24728
    5 | -2.75041
    6 | -2.36022
    7 | -2.05686
    8 | -1.80982
    9 | -1.57551
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
Plots
  pg1: PlotGroup2D "二维绘图组 1" | data = none
    tbls1: TableSurface "表格面图 1"

Exports
  anim1: Animation "动画 1"
    movietype = avi
    giffilename = F:\Homework\闻海虎\超导\k6b2.2.gif
    avifilename = F:\Homework\闻海虎\超导\cir pin defect.avi
    maxframes = 400
  anim2: Animation "动画 2" | framesel = all