// COMSOL Multiphysics 5.3.0.223 model "twoband.mph"
// 未命名
// Outline of the model tree

Parameters
  sig = 1
  k = 2
  B0 = 1.5
  t_h = 0.04
  L = 4
  Bc = 0
  w = 0.1
  k1 = 0.5
  gs = 0.5
  a1 = 1.5
  a2 = 1
  b1 = 1.5
  b2 = 1
  m1 = 1
  m2 = 0.07

Geometry
  geom1 "几何 1" (2D, length unit m)
    sq1: Square "正方形 1" | pos = {-L/2, -L/2}; size = L
    fin: Finalize "形成联合体"

Physics
  g: GeneralFormPDE "广义型偏微分方程" on all domains
    dependent variable u = {u1, u2, u3, u4, u5, u6, u7}
    gfeq1: GeneralFormPDE "广义型偏微分方程 1" (default)
      f = {+(d(u3,x)+d(u4,y))*u2/k+2*(d(u2,x)*u3+d(u2,y)*u4)/k-(u3^2+u4^2)*u1+u1-(u1^2+u2^2)*u1-gs*u6*(sqrt(a2*b1/a1^3/b2)), -(d(u3,x)+d(u4,y))*u1/k-2*(d(u1,x)*u3+d(u1,y)*u4)/k-(u3^2+u4^2)*u2+u2-(u1^2+u2^2)*u2-gs*u7*(sqrt(a2*b1/a1^3/b2)), (u1*d(u2,x)-u2*d(u1,x))/k-(u1^2+u2^2)*u3+((u6*d(u7,x)-u7*d(u6,x))/k-(u6^2+u7^2)*u3)*(m1*a2*b1/m2/a1/b2), (u1*d(u2,y)-u2*d(u1,y))/k-(u1^2+u2^2)*u4+((u6*d(u7,y)-u7*d(u6,y))/k-(u6^2+u7^2)*u4)*(m1*a2*b1/m2/a1/b2), d(u3,x)+d(u4,y)+u5, +(d(u3,x)+d(u4,y))*u7/k1+2*(d(u7,x)*u3+d(u6,y)*u4)/k1-(u3^2+u4^2)*u6 +(m2/m1)*u6-(m2*a2*b1/m1/a1/b2)*(u6^2+u7^2)*u6-gs*u1*(m2/m1)*sqrt(b2/a1/a2/b1), -(d(u3,x)+d(u4,y))*u6/k1-2*(d(u6,x)*u3+d(u6,y)*u4)/k1-(u3^2+u4^2)*u7+(m2/m1)*u7-(m2*a2*b1/m1/a1/b2)*(u6^2+u7^2)*u7-gs*u2*(m2/m1)*sqrt(b2/a1/a2/b1)}
      Ga = 
        {-d(u1,x)/k/k, -d(u1,y)/k/k}
        {-d(u2,x)/k/k, -d(u2,y)/k/k}
        {0, d(u4,x)-d(u3,y)-(B0+Bc*sin(w*t))}
        {-d(u4,x)+d(u3,y)+(B0+Bc*sin(w*t)), 0}
        {u3, u4}
        {-d(u6,x)/k1^2, -d(u6,y)/k1^2}
        {-d(u7,x)/k1^2, -d(u7,y)/k1^2}
      da = {1, 0, 0, 0, 0, 0, 0, 0, 1, 0, 0, 0, 0, 0, 0, 0, sig, 0, 0, 0, 0, 0, 0, 0, sig, 0, 0, 0, 0, 0, 0, 0, 0, 0, 0, 0, 0, 0, 0, 0, 1, 0, 0, 0, 0, 0, 0, 0, 1}
    zflx1: ZeroFluxBoundary "零通量 1" (default)
    init1: init "初始值 1" (default) | u1 = 0.5; u2 = 0.5; u6 = 0.5; u7 = 0.5

Mesh
  mesh1 "网格 1" (physics-controlled)

Studies
  std1 "研究 1"
    time: Transient "瞬态" | tlist = range(0,1,1600)

Solver configurations
  sol1 "解 1" (study std1)
    v1: Variables "Dependent Variables 1"
    t1: Time "Time-Dependent Solver 1" | tlist = range(0,1,1600)
      dDef: Direct
      fc1: FullyCoupled | linsolver = dDef

Datasets
  dset1: Solution | solution = sol1

Plots
  pg1: PlotGroup2D "2D Plot Group 1" | data = dset1
    surf1: Surface | expr = u1